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# Shaft Sizing
V_ar := 52
Mt := 540
n := 200
d := 50
F_t2 := 5714
F_t3 := 15211
F_r2 := 2100
F_r3 := 5590
F_a2 := 803
F_a3 := 2137
l_total := 0.8*d + 1.5*d + d + 1.1*d + 0.9*d = 265
τ_at := 15
Mt := Mt*10^3 = 540000
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d_tentative := nthroot(16*Mt/(π*τ_at), 3) = 56.8099
# According to the table for End Shaft Sizing, in order to correspond with both the
# diameters and the Mt value, d of 50 mm will be chosen.
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d_endshaft := 50
d_3 := 2*Mt/F_t3 = 71.0012
d_2 := 2*Mt/F_t2 = 189.009
l_1 := 0.8*d = 40
l_2 := 1.5*d = 75
l_3 := d = 50
l_4 := 1.1*d = 55
l_5 := 0.9*d = 45
l_2A := l_1/2 + l_2 = 95
l_A3 := l_3 + l_4/2 = 77.5
l_3B := l_4/2 + l_5 = 72.5
# Horizontal Plane
# If ΣM_A = 0, then we find H_B
# If ΣM_B = 0, then we find H_A
# Clockwise positive
H_B := (-F_t3*(l_3 + l_4/2) - F_r2*(l_2 + l_1/2))/(l_3 + l_4 + l_5) = -9189.02
H_A := (F_r2*(l_total - l_1/2) - F_t3*(l_5 + l_4/2))/(l_5 + l_4 + l_3) = -3921.98
-H_B - H_A = 13111
F_t3 - F_r2 = 13111
M_H2left := 0
M_HAleft := -F_r2*l_2A = -199500
M_H3right := H_B*l_3B = -666204
# Vertical Plane
V_B := (-F_t2*l_2A - F_r3*l_A3)/(l_A3 + l_3B) = -6507.03
# If ΣM_A = 0, then we find V_B
# If ΣM_B = 0, then we find V_A
# Counterclock wise positive
V_A := ((-F_r3*l_3B + F_t2*(l_2A + l_A3 + l_3B))/(l_A3 + l_3B)) = 6631.03
-V_A - V_B = -124
-F_t2 + F_r3 = -124
M_V2left := 0
M_VAleft := -F_t2*l_2A = -542830
M_V3.right := V_B*l_3B = -471760
